R1 := 1
Uin_max := 3.5
R2 := 1
Uin_min := 1.5
R3 := 100
Uout_max := 3.3
Uout_min := 0
Ucc := 5
Given
Uout_max == Uin_max*(R3/R1 + 1 + R3/R2) - Ucc*R3/R1
Uout_min == Uin_min*(R3/R1 + 1 + R3/R2) - Ucc*R3/R1
Find(R1, R2) = [202.02; 645.161]
